*Heading
** Job name: Job-1 Model name: Model-1
** Generated by: Abaqus/CAE 2020
*Preprint, echo=NO, model=NO, history=NO, contact=NO
**
** PARTS
**
*Part, name=Part-1
*Node
      1,          -6.,           2.,           0.
      2,          -4.,           0.,           0.
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*Element, type=C3D8R
  1,  949,  950, 3541, 3531,   85,   86,  876,  875
  2,  950,   94,  942, 3541,   86,    1,   87,  876
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*Nset, nset=Set-6, generate
    1,  4665,     1
*Elset, elset=Set-6, generate
    1,  2872,     1
*Nset, nset=U3
    1,    2,    4,    5,    6,    7
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*Elset, elset=U3
  175,  176,  177,  178,  179,  180
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*Nset, nset=U4
    1,    2,    3,    4,    5,    6
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*Elset, elset=U4
    1,    2,    3,    4,    5,    6
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*Nset, nset=Set-1
  1, 14, 15, 22, 24, 32, 59, 62
*Nset, nset=Set-2
 15, 24, 59, 62
*Elset, elset=_Bondbase_S4, internal
  688,  690,  692,  694,  696,  698
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*Elset, elset=_Bondbase_S2, internal, generate
 2593,  2607,     1
*Elset, elset=_Bondbase_S3, internal
 2345, 2346, 2347, 2348, 2349, 2371, 2372, 2373, 2374, 2375, 2397, 2398, 2399, 2400, 2401
*Surface, type=ELEMENT, name=Bondbase
_Bondbase_S4, S4
_Bondbase_S2, S2
_Bondbase_S3, S3
*Elset, elset=_Contactbase_S3, internal
  102,  103,  301,  302,  303,  304
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*Elset, elset=_Contactbase_S4, internal
   88,   89,   90,   91,   92,   93
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*Elset, elset=_Contactbase_S2, internal
  104,  105,  106,  107,  108,  109
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*Surface, type=ELEMENT, name=Contactbase
_Contactbase_S3, S3
_Contactbase_S4, S4
_Contactbase_S2, S2
** Section: Section-1
*Solid Section, elset=Set-6, material=Material-1
,
*End Part
**
*Part, name=Part-2
*Node
      1,          -8.,         0.75,           0.
      2,          -8.,        -0.75,           0.
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*Element, type=C3D8R
 1,   8,  53, 399,  59,   1,  41, 393,  50
 2,  53,  52, 400, 399,  41,  42, 394, 393
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*Nset, nset=Set-6, generate
   1,  894,    1
*Elset, elset=Set-6, generate
   1,  354,    1
*Elset, elset=_Bondstrip_S2, internal, generate
  1,  12,   1
*Elset, elset=_Bondstrip_S1, internal, generate
 13,  24,   1
*Elset, elset=_Bondstrip_S5, internal, generate
 25,  48,   1
*Surface, type=ELEMENT, name=Bondstrip
_Bondstrip_S2, S2
_Bondstrip_S1, S1
_Bondstrip_S5, S5
*Elset, elset=_contactstrip_S1, internal, generate
  49,  354,    1
*Surface, type=ELEMENT, name=contactstrip
_contactstrip_S1, S1
** Section: Section-1
*Solid Section, elset=Set-6, material=Material-1
,
*End Part
**
**
** ASSEMBLY
**
*Assembly, name=Assembly
**
*Instance, name=Part-1-1, part=Part-1
*End Instance
**
*Instance, name=Part-2-1, part=Part-2
          0.,           0.,          0.2
*End Instance
**
*Nset, nset=Set-1, instance=Part-1-1
 15, 24, 62
*Nset, nset=Set-2, instance=Part-1-1
 59,
*Nset, nset=strippool, instance=Part-2-1, generate
 37,  40,   1
** Constraint: Constraint-1
*Tie, name=Constraint-1, adjust=yes
Part-2-1.Bondstrip, Part-1-1.Bondbase
*End Assembly
**
** MATERIALS
**
*Material, name=Material-1
*Elastic
50000., 0.3
**
** INTERACTION PROPERTIES
**
*Surface Interaction, name=IntProp-1
1.,
*Friction, slip tolerance=0.005
 0.2,
**
** BOUNDARY CONDITIONS
**
** Name: BC-1 Type: Symmetry/Antisymmetry/Encastre
*Boundary
Set-1, ZSYMM
** Name: BC-2 Type: Symmetry/Antisymmetry/Encastre
*Boundary
Set-2, ENCASTRE
**
** INTERACTIONS
**
** Interaction: gen_contact
*Contact
*Contact Inclusions, ALL EXTERIOR
*Contact Property Assignment
 ,  , IntProp-1
** ----------------------------------------------------------------
**
** STEP: Step-3
**
*Step, name=Step-3, nlgeom=YES
*Static
1., 1., 1e-05, 1.
**
** BOUNDARY CONDITIONS
**
** Name: BC-3 Type: Displacement/Rotation
*Boundary
strippool, 3, 3, 3.
**
** OUTPUT REQUESTS
**
*Restart, write, frequency=0
**
** FIELD OUTPUT: F-Output-3
**
*Output, field, variable=PRESELECT
**
** HISTORY OUTPUT: H-Output-1
**
*Output, history, variable=PRESELECT
*End Step
